# Introduction
# This document outlines an algorithm for generating a circular grille pattern with a uniform hole density. Many CAD programs provide for circular patterns, but a circular grille generally does not have an obvious plane of symmetry for easy specification.
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# Method
# The pattern generated by this algorithm is generally fixed. That is, the pattern is scaled and truncated to fit a desired aspect ratio of hole diameter d to overall diameter D. The distance between rings is 1.5*d and the arc segment between holes on the same ring is approximately 1.5*d because partial holes are not allowed. The pattern is repeated until the next ring would exceed D. The infinite unit pattern is thus independent of d and D.
#
# The algorithm also allows for specification of the initial hole angle ϕ_i and the subsequent phase shift per ring ϕ_shift. The main purpose of these are to tweak the pattern to obscure obvious linear radial patterns if desired. The plot on the next page helps illustrate this.
# Algorithm
generate_grille(d, D, ϕ_i, ϕ_shift) :=
    pattern ← [0, 0]
    n ← 1
    ϕ_n ← ϕ_i
    rings ← floor((D - d)/(3*d))
    for i ∈ 1, 2 .. rings
        R_i ← 1.5*i*d
        N_i ← floor(2*π*i)
        α_i ← 360 deg/N_i
        for j ∈ 1, 2 .. N_i
            pattern[n, 0] ← pol2xy(R_i, ϕ_n)[0]
            pattern[n, 1] ← pol2xy(R_i, ϕ_n)[1]
            ϕ_n ← ϕ_n + α_i
            n ← n + 1
        ϕ_n ← ϕ_n + ϕ_shift
    return pattern
d ≡ 3
D ≡ 100
coords := generate_grille(d, D, -90 deg, 0 deg)
# [chart]
    X := coords[:, 0]
    Y := coords[:, 1]
